EnvironmentModel= {
  GlobalRef = {
    AnyRefNode Treppe = {
      sRel = {1.38,1.69,0};
      ARel = RotMat(90*pi/180, z);
      AnyDrawSTL DrwSTL = {
        FileName = "Treppe_mit_Gelaender.stl";
        ScaleXYZ={0.001,0.001,0.001};
        RGB = {0.8,0.8,0.8};
      };
    };
  }; // GlobalRef
}; // Environment Model
